<Lems>

    <!--

        This LEMS file has been automatically generated using PyNeuroML v0.5.9 (libNeuroML v0.2.54)

     -->

    <!-- Specify which component to run -->
    <Target component="SimTestNet" reportFile="report.SimTestNet.txt"/>

    <!-- Include core NeuroML2 ComponentType definitions -->
    <Include file="Cells.xml"/>
    <Include file="Networks.xml"/>
    <Include file="Simulation.xml"/>

    <Include file="PyNN.xml"/>
    <Include file="TestNet.net.nml"/>
    <Include file="BallAndStick.cell.nml"/>

    <Simulation id="SimTestNet" length="1000.0ms" step="0.025ms" target="TestNet" seed="5678">  <!-- Note seed: ensures same random numbers used every run -->

        <Display id="pop0_v" title="Plots of pop0_v" timeScale="1ms" xmin="-100.0" xmax="1100.0" ymin="-80" ymax="40">
            <Line id="pop0_0_BallAndStick_0_v" quantity="pop0/0/BallAndStick/0/v" scale="1mV" color="#d54f33" timeScale="1ms"/>
            <Line id="pop0_0_BallAndStick_1_v" quantity="pop0/0/BallAndStick/1/v" scale="1mV" color="#0534e4" timeScale="1ms"/>
            <Line id="pop0_0_BallAndStick_2_v" quantity="pop0/0/BallAndStick/2/v" scale="1mV" color="#98e752" timeScale="1ms"/>
        </Display>

        <OutputFile id="SimTestNet_pop0_v_dat" fileName="SimTestNet.pop0.v.dat">
            <OutputColumn id="pop0_0_BallAndStick_0_v" quantity="pop0/0/BallAndStick/0/v"/>
            <OutputColumn id="pop0_0_BallAndStick_1_v" quantity="pop0/0/BallAndStick/1/v"/>
            <OutputColumn id="pop0_0_BallAndStick_2_v" quantity="pop0/0/BallAndStick/2/v"/>
        </OutputFile>

        <EventOutputFile id="SimTestNet_pop0_spikes" fileName="SimTestNet.pop0.spikes" format="ID_TIME">
            <EventSelection id="0" select="pop0/0/BallAndStick" eventPort="spike"/>
        </EventOutputFile>

    </Simulation>

</Lems>
